*Heading
** Job name: Job-Rail-Wheel-Brake Model name: brake
** Generated by: Abaqus/CAE 2023
*Preprint, echo=NO, model=NO, history=NO, contact=NO
**
** PARTS
**
*Part, name=BRAKE
*Node
      1,   551.148438,   191.148438,          50.
      2,   371.148438,   502.917572,          50.
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*Element, type=C3D8RT
  1,   8,  67, 165,  87,   1,  13, 131,  50
  2,  67,  66, 166, 165,  13,  14, 132, 131
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*Nset, nset=SET-1, generate
   1,  266,    1
*Elset, elset=SET-1, generate
   1,  108,    1
** Section: Section-3-SET-1
*Solid Section, elset=SET-1, controls=EC-2, material=BRAKE
,
*End Part
**
*Part, name=RAIL
*Node
      1,   5921.98047,   944.406372,        2000.
      2,   5921.98047,   772.406372,        2000.
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*Element, type=C3D8RT
    1,    12,    11,   129,   128,  1228,  1129,  9052,  9051
    2,  8132,     8,     7,  8130, 13382,   832,   733, 13380
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*Nset, nset=SET-1, generate
     1,  20100,      1
*Elset, elset=SET-1, generate
     1,  14000,      1
** Section: Section-1-SET-1
*Solid Section, elset=SET-1, controls=EC-1, material=RAIL
,
*End Part
**
*Part, name=WHEEL
*Node
      1,   732.829712,  -560.943481,           0.
      2,   457.826569,  -560.943481,   275.003113
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*Element, type=C3D8RT
   1, 2487,  178, 2459, 5390,  163,    1,  164, 2445
   2, 5390, 2459, 2460, 5391, 2445,  164,  165, 2446
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*Node
   9185,   516.011047,  -526.185181,   52.3895416
*Nset, nset=WHEEL-RefPt_, internal
9185,
*Nset, nset=SET-1, generate
    1,  9184,     1
*Elset, elset=SET-1, generate
    1,  6776,     1
** Section: Section-2-SET-1
*Solid Section, elset=SET-1, controls=EC-1, material=WHEEL
,
*End Part
**
**
** ASSEMBLY
**
*Assembly, name=Assembly
**
*Instance, name=RAIL-1, part=RAIL
-6010.809046,  -782.734798,           0.
*End Instance
**
*Instance, name=WHEEL-1, part=WHEEL
 -709.581427,    33.323546,        573.3
 -709.581427,    33.323546,        573.3,  -709.581427,    33.323546, 574.300000012688, 89.9999992730282
*End Instance
**
*Instance, name=BRAKE-1, part=BRAKE
-148.637942801862, 421.184944925622, 840.413615543181
-148.637942801862, 421.184944925622, 840.413615543181, -148.888505607298, 422.120058039731, 840.163052737745, 93.8409664756632
*End Instance
**
*Instance, name=BRAKE-1-RAD-2, part=BRAKE
-148.637942801862, 561.115309074378, 306.186384456819
-148.637942801862, 561.115309074378, 306.186384456819, -147.94319623565, 561.301465856986, 306.881131023031, 158.909421085518
*End Instance
**
*Node
      1,  -100.903435,   491.150116,   573.299988
      2,  -73.6379395,   671.150146,   879.069153
      3,  -123.637939,   671.150146,   267.530853
      4,  -98.6379395,   491.150116,   927.299988
      5,  -98.6379395,   491.150116,   219.300003
*Nset, nset=B_SET-50, instance=BRAKE-1, generate
   1,  266,    1
*Elset, elset=B_SET-50, instance=BRAKE-1, generate
   1,  108,    1
*Nset, nset=B_SET-52, instance=BRAKE-1-RAD-2, generate
   1,  266,    1
*Elset, elset=B_SET-52, instance=BRAKE-1-RAD-2, generate
   1,  108,    1
*Nset, nset=M_SET-44
 1,
*Nset, nset=M_SET-73
 2,
*Nset, nset=M_SET-74
 3,
*Nset, nset=M_SET-84
 4,
*Nset, nset=M_SET-85
 5,
*Nset, nset=SET-43, instance=RAIL-1
     2,     3,    22,    43,    45,    46
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*Elset, elset=SET-43, instance=RAIL-1
    20,    23,    24,    35,    56,    59
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*Elset, elset=SET-45, instance=BRAKE-1, generate
   1,  108,    1
*Elset, elset=SET-45, instance=BRAKE-1-RAD-2, generate
   1,  108,    1
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*Elset, elset=SET-49, instance=BRAKE-1, generate
   1,  108,    1
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*Nset, nset=SET-56
 1,
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*Nset, nset=SET-70, instance=RAIL-1, generate
     1,  20100,      1
*Nset, nset=SET-70, instance=BRAKE-1, generate
   1,  266,    1
*Nset, nset=SET-70, instance=BRAKE-1-RAD-2, generate
   1,  266,    1
*Nset, nset=SET-70, instance=WHEEL-1, generate
    1,  9184,     1
*Elset, elset=SET-70, instance=RAIL-1, generate
     1,  14000,      1
*Elset, elset=SET-70, instance=BRAKE-1, generate
   1,  108,    1
*Elset, elset=SET-70, instance=BRAKE-1-RAD-2, generate
   1,  108,    1
*Elset, elset=SET-70, instance=WHEEL-1, generate
    1,  6776,     1
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*Nset, nset=SET-80
 4, 5
*Nset, nset=SET-81
 4, 5
*Nset, nset=SET-82
 4,
*Nset, nset=SET-83
 5,
*Nset, nset=SET-86, instance=WHEEL-1, generate
    1,  9184,     1
*Nset, nset=SET-86, generate
 1,  5,  1
*Nset, nset=SET-86, instance=BRAKE-1, generate
   1,  266,    1
*Nset, nset=SET-86, instance=BRAKE-1-RAD-2, generate
   1,  266,    1
*Elset, elset=SET-86, instance=WHEEL-1, generate
    1,  6776,     1
*Elset, elset=SET-86, instance=BRAKE-1, generate
   1,  108,    1
*Elset, elset=SET-86, instance=BRAKE-1-RAD-2, generate
   1,  108,    1
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*Nset, nset=S_SET-44_CNS_, internal, instance=WHEEL-1, generate
    1,  9184,     1
*Elset, elset=_M_SURF-5_S1, internal, instance=BRAKE-1, generate
   1,  108,    1
*Elset, elset=_M_SURF-6_S1, internal, instance=BRAKE-1-RAD-2, generate
   1,  108,    1
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*Elset, elset=_M_SURF-11_S1, internal, instance=BRAKE-1, generate
   1,  108,    1
*Elset, elset=_M_SURF-13_S1, internal, instance=BRAKE-1-RAD-2, generate
   1,  108,    1
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*Elset, elset=_M_SURF-17_S1, internal, instance=BRAKE-1-RAD-2, generate
   1,  108,    1
*Elset, elset=_M_SURF-19_S1, internal, instance=BRAKE-1, generate
   1,  108,    1
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*Elset, elset=_SURF-7_S2, internal, instance=BRAKE-1, generate
   1,  108,    1
*Elset, elset=_SURF-7_S2, internal, instance=BRAKE-1-RAD-2, generate
   1,  108,    1
*Elset, elset=_SURF-10_S2, internal, instance=BRAKE-1, generate
   1,  108,    1
*Elset, elset=_SURF-10_S2, internal, instance=BRAKE-1-RAD-2, generate
   1,  108,    1
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*Surface, type=ELEMENT, name=M_SURF-5
_M_SURF-5_S1, S1
*Surface, type=ELEMENT, name=M_SURF-6
_M_SURF-6_S1, S1
*Elset, elset=_M_SURF-8_S3_1, internal, instance=WHEEL-1
 1303, 1312, 1364, 1373, 1425, 1434
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*Elset, elset=_M_SURF-8_S4_1, internal, instance=WHEEL-1, generate
 1311,  4666,    61
*Elset, elset=_M_SURF-8_S6_1, internal, instance=WHEEL-1, generate
 1332,  4687,    61
*Elset, elset=_M_SURF-8_S5_1, internal, instance=WHEEL-1, generate
 1329,  4684,    61
*Surface, type=ELEMENT, name=M_SURF-8
_M_SURF-8_S3_1, S3
_M_SURF-8_S4_1, S4
_M_SURF-8_S6_1, S6
_M_SURF-8_S5_1, S5
*Surface, type=ELEMENT, name=M_SURF-11
_M_SURF-11_S1, S1
*Surface, type=ELEMENT, name=M_SURF-13
_M_SURF-13_S1, S1
*Elset, elset=_M_SURF-15_S3_1, internal, instance=WHEEL-1
 1303, 1312, 1364, 1373, 1425, 1434
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*Elset, elset=_M_SURF-15_S4_1, internal, instance=WHEEL-1, generate
 1311,  4666,    61
*Elset, elset=_M_SURF-15_S6_1, internal, instance=WHEEL-1, generate
 1332,  4687,    61
*Elset, elset=_M_SURF-15_S5_1, internal, instance=WHEEL-1, generate
 1329,  4684,    61
*Surface, type=ELEMENT, name=M_SURF-15
_M_SURF-15_S3_1, S3
_M_SURF-15_S4_1, S4
_M_SURF-15_S6_1, S6
_M_SURF-15_S5_1, S5
*Surface, type=ELEMENT, name=M_SURF-17
_M_SURF-17_S1, S1
*Surface, type=ELEMENT, name=M_SURF-19
_M_SURF-19_S1, S1
*Elset, elset=_M_SURF-21_S3_1, internal, instance=WHEEL-1
 1303, 1312, 1364, 1373, 1425, 1434
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*Elset, elset=_M_SURF-21_S4_1, internal, instance=WHEEL-1, generate
 1311,  4666,    61
*Elset, elset=_M_SURF-21_S6_1, internal, instance=WHEEL-1, generate
 1332,  4687,    61
*Elset, elset=_M_SURF-21_S5_1, internal, instance=WHEEL-1, generate
 1329,  4684,    61
*Surface, type=ELEMENT, name=M_SURF-21
_M_SURF-21_S3_1, S3
_M_SURF-21_S4_1, S4
_M_SURF-21_S6_1, S6
_M_SURF-21_S5_1, S5
*Surface, type=ELEMENT, name=SURF-7
_SURF-7_S2, S2
*Surface, type=ELEMENT, name=SURF-10
_SURF-10_S2, S2
*Elset, elset=_S_SURF-8_S6_1, internal, instance=RAIL-1
    14,    50,    86,   122,   158,   194
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*Elset, elset=_S_SURF-8_S4_1, internal, instance=RAIL-1, generate
  7233,  10599,     34
*Elset, elset=_S_SURF-8_S3_1, internal, instance=RAIL-1
    16,    52,    88,   124,   160,   196
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*Elset, elset=_S_SURF-8_S5_1, internal, instance=RAIL-1, generate
 10633,  13999,     34
*Surface, type=ELEMENT, name=S_SURF-8
_S_SURF-8_S6_1, S6
_S_SURF-8_S4_1, S4
_S_SURF-8_S3_1, S3
_S_SURF-8_S5_1, S5
*Elset, elset=_S_SURF-11_S3_1, internal, instance=WHEEL-1
 1303, 1312, 1364, 1373, 1425, 1434
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*Elset, elset=_S_SURF-11_S4_1, internal, instance=WHEEL-1, generate
 1311,  4666,    61
*Elset, elset=_S_SURF-11_S6_1, internal, instance=WHEEL-1, generate
 1332,  4687,    61
*Elset, elset=_S_SURF-11_S5_1, internal, instance=WHEEL-1, generate
 1329,  4684,    61
*Surface, type=ELEMENT, name=S_SURF-11
_S_SURF-11_S3_1, S3
_S_SURF-11_S4_1, S4
_S_SURF-11_S6_1, S6
_S_SURF-11_S5_1, S5
*Elset, elset=_S_SURF-13_S3_1, internal, instance=WHEEL-1
 1303, 1312, 1364, 1373, 1425, 1434
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*Elset, elset=_S_SURF-13_S4_1, internal, instance=WHEEL-1, generate
 1311,  4666,    61
*Elset, elset=_S_SURF-13_S6_1, internal, instance=WHEEL-1, generate
 1332,  4687,    61
*Elset, elset=_S_SURF-13_S5_1, internal, instance=WHEEL-1, generate
 1329,  4684,    61
*Surface, type=ELEMENT, name=S_SURF-13
_S_SURF-13_S3_1, S3
_S_SURF-13_S4_1, S4
_S_SURF-13_S6_1, S6
_S_SURF-13_S5_1, S5
*Elset, elset=_S_SURF-15_S6_1, internal, instance=RAIL-1
    14,    50,    86,   122,   158,   194
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*Elset, elset=_S_SURF-15_S4_1, internal, instance=RAIL-1, generate
  7233,  10599,     34
*Elset, elset=_S_SURF-15_S3_1, internal, instance=RAIL-1
    16,    52,    88,   124,   160,   196
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*Elset, elset=_S_SURF-15_S5_1, internal, instance=RAIL-1, generate
 10633,  13999,     34
*Surface, type=ELEMENT, name=S_SURF-15
_S_SURF-15_S6_1, S6
_S_SURF-15_S4_1, S4
_S_SURF-15_S3_1, S3
_S_SURF-15_S5_1, S5
*Elset, elset=_S_SURF-17_S3_1, internal, instance=WHEEL-1
 1303, 1312, 1364, 1373, 1425, 1434
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*Elset, elset=_S_SURF-17_S4_1, internal, instance=WHEEL-1, generate
 1311,  4666,    61
*Elset, elset=_S_SURF-17_S6_1, internal, instance=WHEEL-1, generate
 1332,  4687,    61
*Elset, elset=_S_SURF-17_S5_1, internal, instance=WHEEL-1, generate
 1329,  4684,    61
*Surface, type=ELEMENT, name=S_SURF-17
_S_SURF-17_S3_1, S3
_S_SURF-17_S4_1, S4
_S_SURF-17_S6_1, S6
_S_SURF-17_S5_1, S5
*Elset, elset=_S_SURF-19_S3_1, internal, instance=WHEEL-1
 1303, 1312, 1364, 1373, 1425, 1434
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*Elset, elset=_S_SURF-19_S4_1, internal, instance=WHEEL-1, generate
 1311,  4666,    61
*Elset, elset=_S_SURF-19_S6_1, internal, instance=WHEEL-1, generate
 1332,  4687,    61
*Elset, elset=_S_SURF-19_S5_1, internal, instance=WHEEL-1, generate
 1329,  4684,    61
*Surface, type=ELEMENT, name=S_SURF-19
_S_SURF-19_S3_1, S3
_S_SURF-19_S4_1, S4
_S_SURF-19_S6_1, S6
_S_SURF-19_S5_1, S5
*Elset, elset=_S_SURF-21_S6_1, internal, instance=RAIL-1
    14,    50,    86,   122,   158,   194
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*Elset, elset=_S_SURF-21_S4_1, internal, instance=RAIL-1, generate
  7233,  10599,     34
*Elset, elset=_S_SURF-21_S3_1, internal, instance=RAIL-1
    16,    52,    88,   124,   160,   196
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*Elset, elset=_S_SURF-21_S5_1, internal, instance=RAIL-1, generate
 10633,  13999,     34
*Surface, type=ELEMENT, name=S_SURF-21
_S_SURF-21_S6_1, S6
_S_SURF-21_S4_1, S4
_S_SURF-21_S3_1, S3
_S_SURF-21_S5_1, S5
*Elset, elset=_S_SURF-23_S1_1, internal, instance=BRAKE-1-RAD-2, generate
   1,  108,    1
*Elset, elset=_S_SURF-23_S4_1, internal, instance=BRAKE-1-RAD-2, generate
  18,  108,   18
*Elset, elset=_S_SURF-23_S6_1, internal, instance=BRAKE-1-RAD-2, generate
  1,  91,  18
*Elset, elset=_S_SURF-23_S2_1, internal, instance=BRAKE-1-RAD-2, generate
   1,  108,    1
*Elset, elset=_S_SURF-23_S5_1, internal, instance=BRAKE-1-RAD-2
  37,  38,  39,  40,  41,  42
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*Surface, type=ELEMENT, name=S_SURF-23
_S_SURF-23_S1_1, S1
_S_SURF-23_S4_1, S4
_S_SURF-23_S6_1, S6
_S_SURF-23_S2_1, S2
_S_SURF-23_S5_1, S5
*Elset, elset=_S_SURF-24_S1_1, internal, instance=BRAKE-1, generate
   1,  108,    1
*Elset, elset=_S_SURF-24_S4_1, internal, instance=BRAKE-1, generate
  18,  108,   18
*Elset, elset=_S_SURF-24_S6_1, internal, instance=BRAKE-1, generate
  1,  91,  18
*Elset, elset=_S_SURF-24_S2_1, internal, instance=BRAKE-1, generate
   1,  108,    1
*Elset, elset=_S_SURF-24_S5_1, internal, instance=BRAKE-1
  37,  38,  39,  40,  41,  42
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*Surface, type=ELEMENT, name=S_SURF-24
_S_SURF-24_S1_1, S1
_S_SURF-24_S4_1, S4
_S_SURF-24_S6_1, S6
_S_SURF-24_S2_1, S2
_S_SURF-24_S5_1, S5
*Surface, type=NODE, name=S_SET-44_CNS__CNS_, internal
S_SET-44_CNS_, 1.
** Constraint: CONSTRAINT-1
*Coupling, constraint name=CONSTRAINT-1, ref node=M_SET-44, surface=S_SET-44_CNS__CNS_
*Kinematic, alpha=0.00014
** Constraint: CONSTRAINT-2
*Coupling, constraint name=CONSTRAINT-2, ref node=M_SET-84, surface=S_SURF-23
*Kinematic, alpha=0.00014
** Constraint: CONSTRAINT-3
*Coupling, constraint name=CONSTRAINT-3, ref node=M_SET-85, surface=S_SURF-24
*Kinematic, alpha=0.00014
*End Assembly
**
** ELEMENT CONTROLS
**
*Section Controls, name=EC-1, DISTORTION CONTROL=YES, hourglass=STIFFNESS
1., 1., 1.
*Section Controls, name=EC-2, DISTORTION CONTROL=YES, ELEMENT DELETION=YES, hourglass=STIFFNESS
1., 1., 1.
*Amplitude, name=AMP-1
             0.,              0.,           0.001,              1.
*Amplitude, name=AMP-2, definition=SMOOTH STEP
             0.,              0.,         0.00025,             0.1,         0.00035,             0.2,          0.0005,             0.5
         0.0006,             0.6,         0.00065,             0.8,         0.00075,             0.9,           0.001,              1.
*Amplitude, name=AMP-3
             0.,              0.,             0.1,              1.
*Amplitude, name=AMP-3-COPY
             0.,              0.,              1.,              1.,              6.,             0.2,            12.5,             0.1
*Amplitude, name=AMP-4
             0.,              1.,            0.05,              0.,              1.,              0.
*Amplitude, name=AMP-6, definition=SMOOTH STEP
             0.,              0.,            12.3,             10.
*Amplitude, name=MyAmp-7
             0.,              0.,            0.04,              1.
**
** MATERIALS
**
*Material, name=BRAKE
*Conductivity
45.,200.
32.,400.
30.,500.
25.,700.
22.,800.
*Density
300.,
*Elastic
 5.7e+10, 0.3,200.
*Specific Heat
 4e+09,
*Material, name=RAIL
*Conductivity
45.,
*Density
7830.,
*Elastic
 2.1e+11, 0.3
*Specific Heat
 5e+09,
*Material, name=S355
*Conductivity
  52.,  20.
  51., 100.
  48., 200.
  44., 300.
  43., 400.
  39., 500.
 35.6, 600.
  32., 700.
  28., 723.
  26., 850.
 26.4, 900.
  30.,1250.
  30.,1450.
 120.,1500.
 120.,2000.
*Density
7860.,
*Elastic
 2.06e+11,  0.29,   20.
 2.03e+11,  0.29,  100.
 2.01e+11, 0.295,  200.
    2e+11,  0.31,  300.
 1.65e+11, 0.315,  400.
    1e+11,  0.32,  500.
    6e+10,  0.32,  600.
    4e+10,  0.33,  700.
    3e+10,  0.35,  800.
    2e+10,  0.36,  900.
    1e+10,  0.39, 1000.
    1e+10,  0.39, 1500.
*Expansion
 1.2e-05,  20.
 1.5e-05,1000.
 1.5e-05,1500.
*Inelastic Heat Fraction
         0.9,
*Latent Heat
270000.,1450.,1500.
*Plastic
 4.5e+08,   0.,  20.
 4.5e+08,   0., 100.
 4.2e+08,   0., 200.
 3.9e+08,   0., 300.
 3.2e+08,   0., 400.
 2.6e+08,   0., 500.
 1.7e+08,   0., 600.
   6e+07,   0., 700.
   5e+07,   0., 800.
   5e+07,   0., 900.
   5e+07,   0.,1000.
   5e+07,   0.,1500.
*Specific Heat
480.,  20.
507., 100.
532., 200.
574., 300.
624., 400.
703., 500.
788., 600.
870., 700.
798., 723.
679., 850.
658., 900.
666.,1250.
666.,1450.
670.,1500.
670.,2000.
*Material, name=WHEEL
*Conductivity
45.,
*Density
7800.,
*Elastic
 2.06e+11, 0.328,  200.
*Specific Heat
 5.5e+08,
**
** INTERACTION PROPERTIES
**
*Surface Interaction, name=INTPROP-1
*Friction
 0.3,
*Surface Behavior, pressure-overclosure=HARD
*Surface Interaction, name=INTPROP-2
*Friction
  0.3, , , 20.
 0.28, , ,200.
 0.25, , ,400.
*Surface Behavior, pressure-overclosure=HARD
*Gap Conductance
47., 0.
47., 9.
 0.,10.
*Gap Heat Generation
1., 0.5
*Surface Interaction, name=INTPROP-2-COPY
*Friction
  0.3, , , 20.
 0.28, , ,200.
 0.25, , ,400.
*Surface Behavior, no separation, pressure-overclosure=HARD
*Gap Conductance
47., 0.
47., 9.
 0.,10.
*Gap Heat Generation
15., 0.7
*Surface Interaction, name=MyIntProp
*Friction
 0.008,
*Surface Behavior, pressure-overclosure=HARD
**
** BOUNDARY CONDITIONS
**
** Name: Disp-BC-2 Type: Displacement/Rotation
*Boundary
SET-56, 2, 2
** Name: Disp-BC-3 Type: Displacement/Rotation
*Boundary
SET-56, 5, 5
** Name: Disp-BC-4 Type: Displacement/Rotation
*Boundary
SET-56, 6, 6
** Name: Disp-BC-5 Type: Displacement/Rotation
*Boundary
SET-43, 1, 1
** Name: Disp-BC-6 Type: Displacement/Rotation
*Boundary
SET-43, 2, 2
** Name: Disp-BC-7 Type: Displacement/Rotation
*Boundary
SET-43, 3, 3
** Name: Disp-BC-8 Type: Displacement/Rotation
*Boundary
SET-43, 4, 4
** Name: Disp-BC-9 Type: Displacement/Rotation
*Boundary
SET-43, 5, 5
** Name: Disp-BC-10 Type: Displacement/Rotation
*Boundary
SET-43, 6, 6
**
** PREDEFINED FIELDS
**
** Name: Field-1   Type: Temperature
*Initial Conditions, type=TEMPERATURE
SET-70, 20.
** Name: IC-1   Type: Velocity
*Initial Conditions, type=ROTATING VELOCITY
SET-86, 5., 0., 0., -5.44,
0., 0., 0., 0., 0., 70.,
** ----------------------------------------------------------------
**
** STEP: Step-1
**
*Step, name=Step-1, nlgeom=YES
*Dynamic Temperature-displacement, Explicit, element by element
, 0.04
*Bulk Viscosity
0.06, 1.2
**
** BOUNDARY CONDITIONS
**
** Name: Disp-BC-2 Type: Displacement/Rotation
*Boundary, op=NEW
** Name: Disp-BC-3 Type: Displacement/Rotation
*Boundary, op=NEW
** Name: Disp-BC-4 Type: Displacement/Rotation
*Boundary, op=NEW
** Name: Disp-BC-5 Type: Displacement/Rotation
*Boundary, op=NEW
SET-43, 1, 1
** Name: Disp-BC-6 Type: Displacement/Rotation
*Boundary, op=NEW
SET-43, 2, 2
** Name: Disp-BC-7 Type: Displacement/Rotation
*Boundary, op=NEW
SET-43, 3, 3
** Name: Disp-BC-8 Type: Displacement/Rotation
*Boundary, op=NEW
SET-43, 4, 4
** Name: Disp-BC-9 Type: Displacement/Rotation
*Boundary, op=NEW
SET-43, 5, 5
** Name: Disp-BC-10 Type: Displacement/Rotation
*Boundary, op=NEW
SET-43, 6, 6
** Name: Disp-BC-11 Type: Displacement/Rotation
*Boundary, op=NEW, amplitude=AMP-6
SET-56, 1, 1
** Name: Disp-BC-12 Type: Displacement/Rotation
*Boundary, op=NEW, amplitude=AMP-6
SET-56, 2, 2
** Name: Disp-BC-13 Type: Displacement/Rotation
*Boundary, op=NEW, amplitude=AMP-6
SET-56, 4, 4, 10.
** Name: Disp-BC-14 Type: Displacement/Rotation
*Boundary, op=NEW, amplitude=AMP-6
SET-56, 5, 5
** Name: Disp-BC-15 Type: Displacement/Rotation
*Boundary, op=NEW, amplitude=AMP-6
SET-56, 6, 6
** Name: Disp-BC-16 Type: Displacement/Rotation
*Boundary, op=NEW
SET-80, 1, 1
** Name: Disp-BC-17 Type: Displacement/Rotation
*Boundary, op=NEW
SET-80, 2, 2
** Name: Disp-BC-18 Type: Displacement/Rotation
*Boundary, op=NEW
SET-80, 4, 4
** Name: Disp-BC-19 Type: Displacement/Rotation
*Boundary, op=NEW
SET-80, 5, 5
** Name: Disp-BC-20 Type: Displacement/Rotation
*Boundary, op=NEW
SET-80, 6, 6
**
** LOADS
**
** Name: CFORCE-1   Type: Concentrated force
*Cload, amplitude=MyAmp-7
SET-82, 3, -1e+09
** Name: CFORCE-2   Type: Concentrated force
*Cload, amplitude=MyAmp-7
SET-83, 3, 1e+09
**
** INTERACTIONS
**
** Interaction: INT-BRAKE1-1
*Contact Pair, interaction=MyIntProp, mechanical constraint=KINEMATIC, cpset=INT-BRAKE1-1
S_SURF-17, M_SURF-17
** Interaction: INT-BRAKE2-1
*Contact Pair, interaction=MyIntProp, mechanical constraint=KINEMATIC, cpset=INT-BRAKE2-1
S_SURF-19, M_SURF-19
** Interaction: INT-RAIL-1
*Contact Pair, interaction=MyIntProp, mechanical constraint=KINEMATIC, cpset=INT-RAIL-1
S_SURF-21, M_SURF-21
**
** OUTPUT REQUESTS
**
*Restart, write, number interval=1, time marks=NO
**
** FIELD OUTPUT: F-Output-1
**
*Output, field, number interval=50
*Node Output
A, NT, RF, RFL, U, V
*Element Output, directions=YES
EVF, HFL, LE, PE, PEEQ, PEEQVAVG, PEVAVG, S, SVAVG, TEMP
*Contact Output
CSTRESS,
**
** HISTORY OUTPUT: H-Output-1
**
*Output, history, variable=PRESELECT
*End Step
